<?xml version="1.0"?>
<Node name="root" dt="0.01" gravity="0 -1 0">
	<VisualStyle displayFlags="showVisual showCollisionModels showWireframe"/>
    <RequiredPlugin pluginName="CGALPlugin"/>
    <RequiredPlugin pluginName='SofaOpenglVisual'/>

    <MeshVTKLoader name="meshLoader" filename="data/mesh/edges.vtk" />

    <Refine2DMesh template="Vec3d" name="cgalTool"
                    inputPoints="@meshLoader.position" inputEdges="@meshLoader.edges"
                    useInteriorPoints="false"
                    seedPoints="200 50 0"
                    regionPoints="50 50 0"
                    shapeCriteria="0.125"
                    sizeCriteria="10"
                    viewSeedPoints="1"
                    viewRegionPoints="1"
                    />

	<Node>
        <MechanicalObject position="@../cgalTool.outputPoints" />
        <TriangleSetTopologyContainer position="@../cgalTool.outputPoints" triangles="@../cgalTool.outputTriangles" />
        <TriangleSetGeometryAlgorithms drawTriangles="true"/>
	</Node>
</Node>
